units real
atom_style charge
region box block 0 15 0 15 0 15
create_box 3 box

mass        1 15.9994
mass        2 1.008
mass        3  1.008

pair_style lj/cut/coul/cut 8.0
pair_coeff 1 1 0.160  3.12
pair_coeff 2 2 0.0    1.0
pair_coeff 3 3 0.0    1.0

fix mol all property/atom mol
molecule water tip5p.mol
create_atoms 0 random 150 34564 NULL mol water 25367 overlap 1.33

timestep 0.20
fix integrate all rigid/nvt/small molecule temp 300.0 300.0 1.0
reset_timestep 0
velocity all create 300.0 5463576

thermo_style custom step temp press etotal density pe ke
thermo 1000
run 20000
write_data tip5p.data nocoeff
